// SBML level 3 version 2

model iPSC_Culture_Model()
  // Generic iPSC Culture Model

  // Compartments:
  compartment culture = 1;

  // Species:
  species S in culture = 0.1; S is "Stem_Cells";
  species D in culture = 0.01; D is "Differentiated_Cells";
  species N in culture = 1; N is "Nutrients";

  // Parameters:
  r_S = 0.5; r_S is "stem_growth_rate";
  k_diff = 0.05; k_diff is "differentiation_rate";
  r_D = 0.1; r_D is "differentiated_growth_rate";
  k_N = 0.3; k_N is "nutrient_uptake_rate";
  K_N = 0.5; K_N is "nutrient_half_saturation";
  d_S = 0.02; d_S is "stem_death_rate";
  d_D = 0.03; d_D is "differentiated_death_rate";
  c_S = 0.2; c_S is "stem_nutrient_consumption";
  c_D = 0.1; c_D is "differentiated_nutrient_consumption";
  K_max = 1; K_max is "max_capacity";

  // Reactions:
  stem_growth: N => S; r_S*S*(N/(K_N + N))*(1 - (S + D)/K_max);
  differentiation: S => D; k_diff*S;
  differentiated_growth: N => D; r_D*D*(N/(K_N + N));
  stem_death: S => ; d_S*S;
  differentiated_death: D => ; d_D*D;
  nutrient_consumption_S: N => ; c_S*S;
  nutrient_consumption_D: N => ; c_D*D;
end
